OpenVSP model (file version 5), 11 components.
Geometry view with OpenVSP parameter names; values to 6 digits, angles in degrees, lengths in the model's unit.
Overall bounding box: X_Min=-0.00492843 X_Len=7.24684 Y_Min=-4.59431 Y_Len=9.18863 Z_Min=-1.16344 Z_Len=2.35218

Propeller "Propeller"
  location (X Y Z) 0.245902 0 0, rotation 0 0 0
  bounding box size 0 2 2
  Design: Diameter=2 NumBlade=2 Beta34=20 UseBeta34Flag=1 Feather=0 Rotate=0 Precone=0 ReverseFlag=0 FoldAngle=0 PropMode=2 AF=152.128 CLi=0.540197 Chord=0.175548 Solidity=0.111757 ConstructXoC=0.5 FeatherAxisXoC=0.5 FeatherOffsetXoC=0
  cross sections:
    n  RadiusFrac  shape
    0  0.106557    ellipse Ellipse_Height=0.04 Ellipse_Width=0.08
    1  0.4         NACA 16-series Chord=0.177355 IdealCl=0.7 ThickChord=0.144074
    2  1           NACA 16-series Chord=0.13 IdealCl=0.2 ThickChord=0.03
  Chord along r/R (cubic Bezier): 0.106557: 0.08, 0.271038: 0.15, 0.435519: 0.2, 0.6: 0.2, 0.716667: 0.2, 0.833333: 0.2, 0.95: 0.2, 0.966667: 0.2, 0.983333: 0.2, 1: 0.13
  Twist along r/R (PCHIP): 0.106557: 46.75, 0.75: 20, 1: 13
  Thick along r/R (cubic Bezier): 0.106557: 0.5, 0.171038: 0.3, 0.235519: 0.225, 0.3: 0.2, 0.4: 0.125, 0.5: 0.115, 0.6: 0.1, 0.733333: 0.075, 0.866667: 0.055, 1: 0.03
  CLI along r/R (cubic Bezier): 0.106557: 0, 0.204372: 0.7, 0.302186: 0.7, 0.4: 0.7, 0.466667: 0.7, 0.533333: 0.7, 0.6: 0.7, 0.733333: 0.7, 0.866667: 0.7, 1: 0.2

Wing "Wings"
  location (X Y Z) 1.7 0 0.491803, rotation 0 0 0
  symmetric about XZ
  bounding box size 1.96283 9.18863 0.590091
  totals: TotalSpan=9.2 TotalProjectedSpan=9.09306 TotalChord=1.65569 TotalArea=15.71 TotalAR=5.26315 MAC=1.75278
  root: chord 1.96283, twist 0, NACA 4-series Camber=0 CamberLoc=0.2 ThickChord=0.1
  sections:
    n  Span  Root_Chord  Tip_Chord  Area     Sweep    Sweep_Location  Dihedral  Twist  Twist_Location  tip airfoil
    1  2.8   1.96283     1.82619    5.30463  1.35073  0               0         0      0.25            as above
    2  1.8   1.82619     1.00753    2.55035  4.73286  0               -14       0      0.25            as above

Wing "Elevator"
  location (X Y Z) 6 0 -0.163934, rotation 0 0 0
  symmetric about XZ
  bounding box size 0.875301 3.34285 0.0875809
  totals: TotalSpan=3.26047 TotalProjectedSpan=3.26047 TotalChord=0.85 TotalArea=2.7714 TotalAR=3.83585 MAC=0.850251
  root: chord 0.875301, twist 0, NACA 4-series Camber=0 CamberLoc=0.2 ThickChord=0.1
  sections:
    n  Span     Root_Chord  Tip_Chord  Area    Sweep     Sweep_Location  Dihedral  Twist  Twist_Location  tip airfoil
    1  1.63024  0.875301    0.824699   1.3857  0.946429  0.275           0         0      0.25            as above

Fuselage "Fuselage"
  location (X Y Z) 0 0 0, rotation 0 0 -0.491803
  bounding box size 7.24684 1.21043 1.80162
  Design: Length=7.1
  cross sections:
    n   XLocPercent  YLocPercent  YRotate  ZLocPercent  shape
    0   0            0            0        0            point
    1   0.0655738    0            0        0            circle Circle_Diameter=0.35
    2   0.0655738    0            0        0            ellipse Ellipse_Height=0.26 Ellipse_Width=0.792561
    3   0.121858     0            0        0.0175918    ellipse Ellipse_Height=0.75 Ellipse_Width=0.9378
    4   0.154751     0            0        0.0240092    ellipse Ellipse_Height=0.85 Ellipse_Width=0.985808
    5   0.216047     0            0        0.0240092    ellipse Ellipse_Height=0.865 Ellipse_Width=0.985808
    6   0.277343     0            0        0.00204918   ellipse Ellipse_Height=1.22 Ellipse_Width=1.09224
    7   0.363577     0            0        -0.00614754  ellipse Ellipse_Height=1.33224 Ellipse_Width=1.12245
    8   0.449811     0            0        0            ellipse Ellipse_Height=1.25 Ellipse_Width=1.1
    9   0.572405     0            0        0.0132694    ellipse Ellipse_Height=1.05259 Ellipse_Width=0.96
    10  0.682725     0            0        0.022        ellipse Ellipse_Height=0.89 Ellipse_Width=0.75
    11  0.737885     0            0        0.0260143    ellipse Ellipse_Height=0.79 Ellipse_Width=0.63
    12  0.793045     0            0        0.0309232    ellipse Ellipse_Height=0.69 Ellipse_Width=0.509388
    13  0.846287     0            0        0.0215592    ellipse Ellipse_Height=0.79 Ellipse_Width=0.41
    14  0.899528     0            0        -0.0105      ellipse Ellipse_Height=1.2 Ellipse_Width=0.2
    15  0.955709     0            0        -0.0437075   ellipse Ellipse_Height=1.65 Ellipse_Width=0.2
    16  1            0            -1.92    -0.0452985   ellipse Ellipse_Height=1.65 Ellipse_Width=0
    17  1            0            0        6.71862e-05  point

Pod "right"
  location (X Y Z) 2.3913 -1.35 0.9, rotation 0 -4.67391 0
  bounding box size 0.968263 0.262893 0.339429
  Design: FineRatio=7.22727 Length=0.95

Fuselage "right spat", child of "right"
  location (X Y Z) 2.70492 -1.35 0.983607, rotation 0 90 0
  bounding box size 0.2 0.1 0.55
  Design: Length=0.55
  cross sections:
    n  XLocPercent  YLocPercent  ZLocPercent  shape
    0  0            0            0            point
    1  0.25         0            0            ellipse Ellipse_Height=0.2 Ellipse_Width=0.1
    2  0.5          0            0            as above
    3  0.75         0            0            as above
    4  1            0            0            point

Pod "left"
  location (X Y Z) 2.391 1.2 0.9, rotation 0 -4.67391 0
  bounding box size 0.968263 0.262893 0.339429
  Design: FineRatio=7.22727 Length=0.95

Fuselage "left spat", child of "left"
  location (X Y Z) 2.70492 1.2 0.983607, rotation 0 90 0
  bounding box size 0.2 0.1 0.55
  Design: Length=0.55
  cross sections:
    n  XLocPercent  YLocPercent  ZLocPercent  shape
    0  0            0            0            point
    1  0.25         0            0            ellipse Ellipse_Height=0.2 Ellipse_Width=0.1
    2  0.5          0            0            as above
    3  0.75         0            0            as above
    4  1            0            0            point

Pod "center"
  location (X Y Z) 0.76087 -0.04 0.9, rotation 0 -4.67391 0
  bounding box size 0.968263 0.262893 0.339429
  Design: FineRatio=7.22727 Length=0.95

Fuselage "center spat", child of "center"
  location (X Y Z) 1.08887 -0.04 1, rotation 0 90 0
  bounding box size 0.2 0.1 0.6
  Design: Length=0.6
  cross sections:
    n  XLocPercent  YLocPercent  ZLocPercent  shape
    0  0            0            0            point
    1  0.25         0            0            ellipse Ellipse_Height=0.2 Ellipse_Width=0.1
    2  0.5          0            0            as above
    3  0.75         0            0            as above
    4  1            0            0            point

Gear "wheels"
  location (X Y Z) 2.70833 0 0.938, rotation 0.0520833 0 0
  bounding box size 1.85 2.73195 0.256483
  bogie "R": NumAcross=1 NumTandem=1 Spacing=0.0916667 Pitch=0.275 Symmetrical=0 XContactPt=0 YContactPt=-1.35678 TravelCompressed=1 TravelExtended=1 SteeringAngle=0 DiameterModel=0.25 WidthModel=0.0833333 PlyRating=20
  bogie "C": NumAcross=1 NumTandem=1 Spacing=0.0916667 Pitch=0.275 Symmetrical=0 XContactPt=-1.6 YContactPt=-0.0402513 TravelCompressed=1 TravelExtended=1 SteeringAngle=0 DiameterModel=0.25 WidthModel=0.0833333 PlyRating=20
  bogie "L": NumAcross=1 NumTandem=1 Spacing=0.0916667 Pitch=0.275 Symmetrical=0 XContactPt=0 YContactPt=1.20603 TravelCompressed=1 TravelExtended=1 SteeringAngle=0 DiameterModel=0.25 WidthModel=0.0833333 PlyRating=20
